# Question 1 [10 Points]
# Calculate the voltage required to accelerate a xenon ion to an Isp of 1,864 seconds. Assume 90 efficiency. Include units in your answer.
W := 131.29 gm/mol
I_sp := 1864 s
η := 0.9
N_a := 6.023*10^23 mol^-1
g_0 := 9.81 m/s^2
q := 1.6*10^-19 C
V := 1/2*W/N_a*(I_sp*g_0)^2/(η*q) = 253.079 V
# Question 3 [10 points]
# For a converging nozzle, calculate the force that would occur given the following parameters;
#
# Atmospheric pressure = standard atmosphere conditions (101.325 kPa).
# Absolute chamber pressure = 12 bar.
# Ratio of specific heats = 1.26.
# Throat area = 0.03 m2.
#
# Give your answer to two decimal places, and include SI units.
kPa := 10^3 Pa
P_a := 101.325 kPa = 101325 Pa
P_c := 12 bar = 1200000 Pa
k := 1.26
A_t := 0.03 m^2
# As the nozzle is only converging the following equation can be used
P_e := P_c*(2/(k + 1))^(k/(k - 1)) = 663674 Pa
F := A_t*P_c*sqrt(2*k^2/(k - 1)*(2/(k + 1))^((k + 1)/(k - 1))*(1 - (P_e/P_c)^((k - 1)/k))) + (P_e - P_a)*A_t = 41957.4 N
# Question 4 [10 Points]
# Calculate the value of coefficient of thrust for a C-D nozzle under ideal expansion conditions, given the following values.
#
# Ratio of specific heats = 1.26.
# atmospheric pressure = 62,158 Pa.
# Chamber pressure = 1,841,566 Pa.
#
# Give your answer to two decimal places.
k := 1.26
P_a := 62158 Pa
P_c := 1841566 Pa
# As it says ideal conditions:
P_e := 62158 Pa
# Only unknows are the area ratio, so it is calculated first
AR := ((k + 1)/2)^(1/(k - 1))*(P_e/P_c)^(1/k)*sqrt(((k + 1)/(k - 1))*(1 - (P_e/P_c)^((k - 1)/k))) = 0.227253
C_F := sqrt(2*k^2/(k - 1)*(2/(k + 1))^((k + 1)/(k - 1))*(1 - (P_e/P_c)^((k - 1)/k))) + (P_e - P_a)/P_c*1/AR = 1.45719
# Question 5 [10 Points]
#
# Calculate the length of an 65 % bell nozzle based upon a 15 degree conical nozzle, with a throat radius of 0.14 m, an expansion ratio of 98, and a throat radius of curvature of 1.5 the throat radius. Give the answer to two decimal places, and include units.
θ_e := 15 deg
R_t := 0.14 m
ε := 98
R_1 := 1.5*R_t = 0.21 m
L_15 := (R_t*(sqrt(ε) - 1) + R_1*(1/cos(θ_e) - 1))/tan(θ_e) = 4.67752 m
L_15at65 := 0.65*L_15 = 3.04039 m
