# Question 3 [10 Points]
# Using the following figures approximate the percentage change in specific impulse for a LOX/H2 rocket engine operating at the mixture ratios of 7.0 and 4.2. Assume close to ideal expansion in vacuum conditions, and a very high chamber pressure. Give your answer as a percentage.
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T_c_7 := 3500 K
γ_7 := 1.2
W_7 := 14.5 gm/mol
R = 8.31446 kg*m^2/(s^2*K*mol)
T_c_4.2 := 3000 K
γ_4.2 := 1.22
W_4.2 := 10.1 gm/mol
g = 9.80665 m/s^2
I_sp_7 := 1/g*sqrt(R/W_7*2*γ_7/(γ_7 - 1)*T_c_7) = 500.423 s
I_sp_4.2 := 1/g*sqrt(R/W_4.2*2*γ_4.2/(γ_4.2 - 1)*T_c_4.2) = 533.679 s
perc_change := (I_sp_4.2 - I_sp_7)/I_sp_7*100 = 6.64558
# Question 6 [10 Points]
# Given the following values, calculate the specific impulse of the rocket;
# Coefficient of thrust = 1.13.
# Ratio of specific heats = 1.38.
# Chamber temperature = 2,383 degrees K.
# Average molecular mass of combustion products = 19.2 g/mol. Give your answer in seconds.
W := 19.2 gm/mol
T_c := 2383 K
γ_6 := 1.38
C_F := 1.13
c_star := sqrt(γ_6*R*T_c/W)/(γ_6*sqrt((2/(γ_6 + 1))^((γ_6 + 1)/(γ_6 - 1)))) = 1490.97 m/s
I_sp := C_F*c_star/g = 171.802 s
# Question 8 [10 marks]
#
# Given the following values, calculate a suitable port radius for a hybrid rocket with 1 cylindrical port of lengths 0.5 m that requires a thrust of 400 N. Take the specific impulse to be 200 seconds.
# Mass flow rate of oxidiser = 0.171 kg/s.
# Density of propellant = 940 kg/m3.
# exponent n = 0.7.
# coefficient a = 7×10-6 m3/kg.
# Give your answer in mm.
Numb := 1
L := 0.5 m
T := 400 N
I_sp := 200 s
m_oxidizer := 0.171 kg/s
rho_p := 940 kg/m^3
n := 0.7
a := 7*10^-6 m^3/kg
m_flow := T/(g*I_sp) = 0.203943 kg/s
R_p_dash := m_flow/(2*π^(1 - n)*rho_p*Numb^(1 - n)*a*m_oxidizer^n*L) = 75.6905 kg^(3/10)/(m*s^(3/10))
# A solid propellant with a neutrally burning grain has the following properties;
#
# Temperature sensitivity of burning rate = 0.7 %/°C.
# Burning rate at nominal conditions of 21°C and chamber pressure of 100 bar r = 2.9 mm/s.
# Nominal burn time, tb at 100 bar is 50 s.
# Burn area at engine start is 2.3 m2.
# Density of the propellant is 1500 kg/m3.
# Determine the percentage change in thrust for a +10°C change from the nominal ambient operating conditions. Assume that the chamber pressure does not vary, and that any variation in regression rate is linear. Give your answer as a percentage.
sigma := 0.007
T_0 := 21 °C
P_c := 100 bar
r_0 := 2.9 mm/s
t_b_0 := 50 s
T_1 := 31 °C
r_1 := 3.109 mm/s
