# Question 1 [5 Marks]
# Determine the Larmor radius for ions in a SPT-100 Hall thruster. Assume the following values;
# Magnetic field strength = 0.019 tesla.
# Discharge potential = 329 V.
# Voltage discharge efficiency = 93 %.
# Electron temperature = 30 eV.
# Take the propellant to be xenon. Give your answer in cm.
eV := 1.60*10^-19 J
B := 0.019 T
m_Xe := 2.18*10^-25 kg
V_d := 329 V
q_e := 1.60*10^-19 C
η_V := 0.93
T_e_Energy := 30 eV
T_e_Temp := T_e_Energy/k = 347663 K
v_perp := sqrt(2*q_e*V_d*η_V/m_Xe) = 21192.7 m/s
r_L := m_Xe*v_perp/(q_e*B) = 151.974 cm
# Question 2 [10 Marks]
# Calculate the percentage change in payload mass possible for a spacecraft using an electric propulsion system, when the ion thruster firing time changes from 30 days to 60 days. Take the percentage change to be relative to 60 days. Take the required change in velocity to be 1 km/s, a specific power plant mass of 20 kg/kW, a specific impulse of 2,423 seconds, and a thruster efficiency of 75 %.
days := 24*60*60 s
ΔV := 1 km/s
t_b1 := 30 days
α := 20 kg/kW
t_b2 := 60 days
I_sp := 2423 s
η_T := 0.75
c := I_sp*g = 23761.5 m/s
v_c1 := sqrt(2*η_T*t_b1/α) = 13942.7 m/s
v_c2 := sqrt(2*η_T*t_b2/α) = 19718 m/s
M_payload_frac_1 := e^(-ΔV/c)*(1 + c^2/v_c1^2) - c^2/v_c1^2 = 0.839095
M_payload_frac_2 := e^(-ΔV/c)*(1 + c^2/v_c2^2) - c^2/v_c2^2 = 0.898942
perc_change := M_payload_frac_1/M_payload_frac_2*100 = 93.3425
# Question 5 [5 Marks]
# Calculate a value that demonstrates the following is a plasma.
# Electron temperature = 18 eV.
# Plasma density = 49 × 1012 particles per m3.
# Diameter of gridded ion thruster discharge chamber = 20 cm.
# Give your answer in cm.
T_e_Energy := 18 eV
T_e_Temp := T_e_Energy/k = 208598 K
n := 49*10^12 m^-3
λ_D := sqrt(ε_0*k*T_e_Temp/(n*e_c^2)) = 1.5019e-11 c*s
# Question 6 [10 Marks]
# A mission to Mercury is being designed, which has the following values. Calculate the value of specific power plant mass required to make this mission feasible.
# Thruster total efficiency = 62 %.
# Initial acceleration = 1.18×10-3 m/s2.
# Specific impulse = 3,132 seconds.
# Change in velocity = 3.9 km/s.
# Payload mass = 1500 kg.
# Initial mass = 4300 kg.
# Give your answer in kg/kW.
η_T := 0.62
m_payload := 1500 kg
a_init := 1.18*10^-3 m/s^2
m_o := 4300 kg
I_sp := 3132 s
ΔV := 3.9*10^3 km/s
2*η_T/(a_init*c) = 0.0442248 s^3/m^2
c := I_sp*g = 30714.4 m/s
α := 2*η_T/(a_init*c)*(e^(-ΔV/c) - m_payload/m_o) = -11.9349 kg/kW
# Question 7 [10 Marks]
# Calculate the difference in thrust between using xenon and krypton in a Hall thruster, given the following parameters. Give your answers in mN.
# Discharge potential for both xenon and krypton = 286 V.
# Voltage discharge efficiency for both xenon and krypton = 90 %.
# Discharge current = 2.4 A.
# Current discharge efficiency for xenon = 85 %.
# Current discharge efficiency for krypton = 75 %.
# Double charged ion loss for both xenon and krypton = 99 %.
# Beam divergence half angle for xenon = 30 degrees.
# Beam divergence half angle for krypton = 40 degrees.
V_d := 286 V
η_I_d_Xe := 0.85
η_I_d_Kr := 0.75
mN := 0.001 N
η_V_d := 0.9
θ_Xe := 30 deg
θ_Kr := 40 deg
I_d := 2.4 A
m_Xe := 2.18*10^-25 kg
m_Kr := 1.39*10^-25 kg
α := 0.99
V_b := V_d*η_V_d = 257.4 V
I_b_Xe := I_d*η_I_d_Xe = 2.04 A
I_b_Kr := I_d*η_I_d_Kr = 1.8 A
η_cos_Xe := 1/2*(1 + cos(θ_Xe)^2) = 0.875
η_cos_Kr := 1/2*(1 + cos(θ_Kr)^2) = 0.793412
T_Xe := α*η_cos_Xe*sqrt(2*m_Xe/e_c)*I_b_Xe*sqrt(V_b) = 46.7698 mN
T_Kr := α*η_cos_Kr*sqrt(2*m_Xe/e_c)*I_b_Kr*sqrt(V_b) = 37.4196 mN
ΔT := T_Xe - T_Kr = 9.35025 mN
