kJ := 10^3 J
MeV := 1.6*10^-13 J
# Energy Per Kilogram Released During Combustion
M_Water := 18.01528 gm/mol
BE_H2 := 436 kJ/mol
BE_O2 := 498 kJ/mol
BE_OH := 428 kJ/mol
BE_OHH := 498.7 kJ/mol
E_kg := ((BE_OH + BE_OHH) - (BE_H2 + BE_O2/2))/M_Water = 13416389 J/kg
# Maximum Chemical Performance
η := 0.9
g_0 := 9.81 m/s^2
c := sqrt(2*η*E_kg) = 4914.21 m/s
I_sp := c/g_0 = 500.939 s
# Voltage Required for an Isp of 500s Using Ionized Water
M_Water := 18.01528 gm/mol
η := 0.9
g_0 := 9.81 m/s^2
N_a := 6.023*10^23 mol^-1
I_sp := 500 s
q := 1.6*10^-19 C
V := 1/2*M_Water/N_a*(I_sp*g_0)^2/(η*q) = 2.4987 V
# Energy Transfered to One Water Molecule During One Nuclear Fission Event
E_U235 := 180 MeV = 2.88e-11 J
M_Water := 18.01528 gm/mol
N_a := 6.023*10^23 mol^-1
m_Water := M_Water/N_a = 2.99108e-26 kg  # <- is 2.99x10^-26 but is too small for mathcad to show
E_kg := E_U235/m_Water = 9.62863e14 J/kg
# Performance of a Nuclear Thermal System
η := 0.9
g_0 := 9.81 m/s^2
c := sqrt(2*η*E_kg) = 41631151 m/s
I_sp := c/g_0 = 4243746 s
